# Generated by dxf2inp.py
# from “sandwich.dxf”
# on 2021-06-20 17:52:16

# Points extracted from DXF
pnt P1 0.0 0.0000000 0.0000000
pnt P2 0.0 0.2000000 0.0000000
pnt P3 0.0 0.2000000 0.0020000
pnt P4 0.0 0.0000000 0.0020000
pnt P5 0.0 0.0000000 0.0100000
pnt P6 0.0 0.2000000 0.0100000
pnt P7 0.0 0.2000000 0.0130000
pnt P8 0.0 0.0000000 0.0130000

# Lines extracted from DXF
line L01 P1 P2
line L02 P2 P3
line L03 P3 P4
line L04 P4 P1
line L05 P5 P6
line L06 P6 P7
line L07 P7 P8
line L08 P8 P5
line L09 P3 P6
line L10 P4 P5

# Detected surfaces
surf S1 L01 L02 L03 L04
surf S2 L03 L05 L09 L10
surf S3 L05 L06 L07 L08

# Show geometry up to now
plot pa all
plus la all
plus sa all
rot y
rot r 90
break
